<Lems>

    <Include file="UnifiedChannel.xml"/>

    <!--

    "params = "{
        "v_half = "-0.0180258243417786,
        "slope = "0.02767644720667024,
        "e_rev = "-0.10214357831312094,
        "g = "0.0005145869718619175,
        "ra = "1.2544609703106782,
        "sa = "-47.83800773213494,
        "rb = "40.02690897092817,
        "vb = "0.03709222498027761,
        "sb = "0.012461435698388186,
        "rc = "0.14598906450108934
    },

    -->

    <UnifiedChannel id="Kcnh1"
        conductance="0.0005145869718619175 S"
        v_half = "-0.0180258243417786 V"
        slope = "0.02767644720667024 V"
        ra = "1.2544609703106782 per_s"
        sa = "-47.83800773213494 per_V"
        rb = "40.02690897092817 per_s"
        vb = "0.03709222498027761 V"
        sb = "0.012461435698388186 V"
        rc = "0.14598906450108934 per_s">

    </UnifiedChannel>

</Lems>
